// SBML level 2 version 5

model main()

  // Compartments:
  compartment Cell = 1;

  // Species:
  species benzaldehyde_lyase in Cell = 1; benzaldehyde_lyase is "benzaldehyde-lyase";  // substance in mM; isVersionOf uniprot:P51853
  species CAS_93_02_7 in Cell = 4; CAS_93_02_7 is "dimethoxy-benzaldehyde";  // substance in mM
  species CHEBI_17169 in Cell = 0; CHEBI_17169 is "benzaldehyde";  // substance in mM; CHEBI:17169

  // Reactions:
  Michaelis_Menten_Kinetic: CAS_93_02_7 -> CHEBI_17169; kcat*E*A/(KMA + A);  // modifiers: benzaldehyde_lyase
    KMA = 100 mM; kcat = 100 katal; E = 100 mM; A = 100 mM;

  // Unit definitions:
  unit mM = 1e-3 mole / litre;
  unit s_1 = 1 / second;
  unit K = kelvin;
  unit min = 60 second;
  unit mm^3 = (1e-3 meter)^3; mm^3 is "min";
end
